// SBML level 2 version 4

model MODEL1309060000()
  // Besozzi2012 - Oscillatory regimes in the Ras/cAMP/PKA pathway in S.cerevisiae

  // Compartments:
  compartment compartment01 = 1;

  // Species:
  species Ras2_GDP in compartment01 = 20000/compartment01;
  species Cdc25 in compartment01 = 300/compartment01;
  species Ras2_GDP_Cdc25 in compartment01 = 0;
  species Ras2_Cdc25 in compartment01 = 0;
  species $GDP in compartment01 = 1500000/compartment01;
  species $GTP in compartment01 = 5000000/compartment01;
  species Ras2_GTP_Cdc25 in compartment01 = 0;
  species Ras2_GTP in compartment01 = 0;
  species Ira2 in compartment01 = 200/compartment01;
  species Ras2_GTP_Ira2 in compartment01 = 0;
  species CYR1 in compartment01 = 200/compartment01;
  species Ras2_GTP_CYR1 in compartment01 = 0;
  species $ATP in compartment01 = 24000000/compartment01;
  species cAMP in compartment01 = 0;
  species PKA in compartment01 = 2500/compartment01;
  species cAMP_PKA in compartment01 = 0;
  species IIcAMP_PKA in compartment01 = 0;
  species IIIcAMP_PKA in compartment01 = 0;
  species IVcAMP_PKA in compartment01 = 0;
  species C in compartment01 = 0;
  species R_2cAMP in compartment01 = 0;
  species R in compartment01 = 0;
  species R_C in compartment01 = 0;
  species Pde1 in compartment01 = 1400/compartment01;
  species Pde1f in compartment01 = 0;
  species cAMP_Pde1f in compartment01 = 0;
  species AMP in compartment01 = 0;
  species PPA2 in compartment01 = 4000/compartment01;
  species Pde2 in compartment01 = 6500/compartment01;
  species cAMP_Pde2 in compartment01 = 0;
  species Cdc25f in compartment01 = 0;
  species Ira2P in compartment01 = 0;
  species Ras2_GTP_Ira2P in compartment01 = 0;

  // Parameters:
  K0 = 1;
  K1 = 1;
  K2 = 1.5;
  K3 = 1;
  K4 = 1;
  K5 = 1;
  K6 = 1;
  K7 = 1;
  K8 = 0.01;
  K9 = 0.25;
  K10 = 0.001;
  K11 = 2.1e-6;
  K12 = 0.001;
  K13 = 1e-5;
  K14 = 1e-5;
  K15 = 1e-5;
  K16 = 1e-5;
  K17 = 0.1;
  K18 = 0.1;
  K19 = 0.1;
  K20 = 0.1;
  K21 = 1;
  K22 = 1;
  K23 = 0.75;
  K24 = 1;
  K25 = 1e-6;
  K26 = 0.1;
  K27 = 0.1;
  K28 = 7.5;
  K29 = 0.0001;
  K30 = 0.0001;
  K31 = 1;
  K32 = 1.7;
  K33 = 1;
  K34 = 0.01;
  K35 = 0.001;
  K36 = 1.25;
  K37 = 2.5;
  K38 = 10;

  // Reactions:
  R0: Ras2_GDP + Cdc25 => Ras2_GDP_Cdc25; K0*Ras2_GDP*Cdc25;
  R1: Ras2_GDP_Cdc25 => Ras2_GDP + Cdc25; K1*Ras2_GDP_Cdc25;
  R2: Ras2_GDP_Cdc25 => Ras2_Cdc25 + $GDP; K2*Ras2_GDP_Cdc25;
  R3: Ras2_Cdc25 + $GDP => Ras2_GDP_Cdc25; K3*Ras2_Cdc25*GDP;
  R4: Ras2_Cdc25 + $GTP => Ras2_GTP_Cdc25; K4*Ras2_Cdc25*GTP;
  R5: Ras2_GTP_Cdc25 => Ras2_Cdc25 + $GTP; K5*Ras2_GTP_Cdc25;
  R6: Ras2_GTP_Cdc25 => Cdc25 + Ras2_GTP; K6*Ras2_GTP_Cdc25;
  R7: Cdc25 + Ras2_GTP => Ras2_GTP_Cdc25; K7*Cdc25*Ras2_GTP;
  R8: Ras2_GTP + Ira2 => Ras2_GTP_Ira2; K8*Ras2_GTP*Ira2;
  R9: Ras2_GTP_Ira2 => Ras2_GDP + Ira2; K9*Ras2_GTP_Ira2;
  R10: Ras2_GTP + CYR1 => Ras2_GTP_CYR1; K10*Ras2_GTP*CYR1;
  R11: Ras2_GTP_CYR1 + $ATP => Ras2_GTP_CYR1 + cAMP; K11*Ras2_GTP_CYR1*ATP;
  R12: Ira2 + Ras2_GTP_CYR1 => Ras2_GDP + Ira2 + CYR1; K12*Ira2*Ras2_GTP_CYR1;
  R13: cAMP + PKA => cAMP_PKA; K13*cAMP*PKA;
  R14: cAMP + cAMP_PKA => IIcAMP_PKA; K14*cAMP*cAMP_PKA;
  R15: cAMP + IIcAMP_PKA => IIIcAMP_PKA; K15*cAMP*IIcAMP_PKA;
  R16: cAMP + IIIcAMP_PKA => IVcAMP_PKA; K16*cAMP*IIIcAMP_PKA;
  R17: IVcAMP_PKA => cAMP + IIIcAMP_PKA; K17*IVcAMP_PKA;
  R18: IIIcAMP_PKA => cAMP + IIcAMP_PKA; K18*IIIcAMP_PKA;
  R19: IIcAMP_PKA => cAMP + cAMP_PKA; K19*IIcAMP_PKA;
  R20: cAMP_PKA => cAMP + PKA; K20*cAMP_PKA;
  R21: IVcAMP_PKA => 2 C + 2 R_2cAMP; K21*IVcAMP_PKA;
  R22: R_2cAMP => 2 cAMP + R; K22*R_2cAMP;
  R23: C + R => R_C; K23*C*R;
  R24: 2 R_C => PKA; K24*(R_C*(R_C - 1)/2);
  R25: C + Pde1 => C + Pde1f; K25*C*Pde1;
  R26: cAMP + Pde1f => cAMP_Pde1f; K26*cAMP*Pde1f;
  R27: cAMP_Pde1f => cAMP + Pde1f; K27*cAMP_Pde1f;
  R28: cAMP_Pde1f => Pde1f + AMP; K28*cAMP_Pde1f;
  R29: Pde1f + PPA2 => Pde1 + PPA2; K29*Pde1f*PPA2;
  R30: cAMP + Pde2 => cAMP_Pde2; K30*cAMP*Pde2;
  R31: cAMP_Pde2 => cAMP + Pde2; K31*cAMP_Pde2;
  R32: cAMP_Pde2 => AMP + Pde2; K32*cAMP_Pde2;
  R33: Cdc25 + C => C + Cdc25f; K33*Cdc25*C;
  R34: PPA2 + Cdc25f => Cdc25 + PPA2; K34*PPA2*Cdc25f;
  R35: Ira2 + C => C + Ira2P; K35*Ira2*C;
  R36: Ras2_GTP + Ira2P => Ras2_GTP_Ira2P; K36*Ras2_GTP*Ira2P;
  R37: Ras2_GTP_Ira2P => Ras2_GDP + Ira2P; K37*Ras2_GTP_Ira2P;
  R38: Ira2P => Ira2; K38*Ira2P;

  // Unit definitions:
  unit MWUSERUNIT_per_second = dimensionless / second;
end
